// SBML level 3 version 1

model Stochastic()
  // model units - substance: substance, time: time_unit, volume: volume

  // Compartments:
  compartment Cytoplasm = 3000 volume;
  compartment Nucleus = 1000 volume;

  // Species:
  species nuc_gene_a__LIGAND_ in Nucleus = 1;
  species nuc_gene_i__LIGAND_ in Nucleus = 1;
  species nuc_gene_a__RECEPTOR_ in Nucleus = 1;
  species nuc_gene_i__RECEPTOR_ in Nucleus = 1;
  species cyt_mrna__LIGAND_ in Cytoplasm = 10;
  species cyt_mrna__RECEPTOR_ in Cytoplasm = 10;

  // Parameters:
  kGac1_1 = 0.0005;
  kGac2_1 = 0.0005;
  kGin1_1 = 0.005;
  kGin2_1 = 0.005;
  kTC1_1 = 5e-6;
  kTC2_1 = 5e-6;
  kTCd1_1 = 5e-5;
  kTCd2_1 = 5e-5;
  cyt_prot__LIGAND_ = 20;
  cyt_prot__RECEPTOR_ = 100;
  cyt_prot__LIGAND__RECEPTOR_ = 0;
  kTL1_1 = 1;
  kTL2_1 = 1;
  kLR1_1 = 0.01;
  kLR2_1 = 0.01;
  kLR3_1 = 0.009;
  kLR4_1 = 0.009;
  nuc_gene_i__LIGAND = ;

  // Reactions:
  vGac1: nuc_gene_i__LIGAND_ => nuc_gene_a__LIGAND_; kGac1_1*nuc_gene_i__LIGAND_*(1 - (nuc_gene_i__LIGAND_/(nuc_gene_a__LIGAND_ + nuc_gene_i__LIGAND) || 0));
  vGac2: nuc_gene_i__RECEPTOR_ => nuc_gene_a__RECEPTOR_; kGac2_1*nuc_gene_i__RECEPTOR_*(1 - (nuc_gene_i__RECEPTOR_/(nuc_gene_a__RECEPTOR_ + nuc_gene_i__RECEPTOR_) || 0));
  vGin1: nuc_gene_a__LIGAND_ => nuc_gene_i__LIGAND_; kGin1_1*nuc_gene_a__LIGAND_*(1 - (nuc_gene_a__LIGAND_/(nuc_gene_a__LIGAND_ + nuc_gene_i__LIGAND) || 0));
  vGin2: nuc_gene_a__RECEPTOR_ => nuc_gene_i__RECEPTOR_; kGin2_1*nuc_gene_a__RECEPTOR_*(1 - (nuc_gene_i__RECEPTOR_/(nuc_gene_a__RECEPTOR_ + nuc_gene_i__RECEPTOR_) || 0));
  vTC1: => cyt_mrna__LIGAND_; kTC1_1;
  vTC2: => cyt_mrna__RECEPTOR_; kTC2_1;
  vTCd1: cyt_mrna__LIGAND_ => ; kTCd1_1;
  vTCd2: cyt_mrna__RECEPTOR_ => ; kTCd2_1;

  // Unit definitions:
  unit volume = litre;
  unit time_unit = second;
  unit substance = 1e-9 mole;
  unit mpc = 1;
  unit molecule = 1;
end
